# Title: SEDAC P2.02 - Memoria de cálculo preliminar
# Description: Prediseño; entradas editables y verificaciones dimensionales. Rev. MC01. Sin validación física.
# SEDAC / P2.02 / MC01
# 1. Alcance y escenario de carga
# Memoria editable en Mathcad clásico. Diseño de referencia: P2.02, 15/10/2026.
# Se estudia un sistema auxiliar para apoyar y estabilizar una bomba de espalda. Se revisan
# rieles, cuna, cartelas, anclajes y uniones con modelos analíticos simplificados.
# Las entradas azules son hipótesis de prediseño. La bomba real, el arnés, la temperatura y el
# espectro de fatiga siguen pendientes. Un margen calculado no acredita la seguridad del
# conjunto.
Mass := 25*kg
Mass = 25 kg
grav := 9.81*m/s^2
grav = 9.81 m/s^2
av := 3
av = 3
ah := 1
ah = 1
eta := 0.7
eta = 0.7
Fv := Mass*grav*av
Fv = 735.75 N
Fh := Mass*grav*ah
Fh = 245.25 N
# av = 3 representa 3 g verticales totales, incluida gravedad. Fh es una fuerza horizontal
# resultante de dirección variable. Se asigna 70% al lado más cargado.
# SEDAC / P2.02 / MC01
# 2. Geometría y propiedades de referencia
H := 500*mm
H = 500 mm
Sep := 200*mm
Sep = 200 mm
b := 50*mm
b = 50 mm
d := 25*mm
d = 25 mm
t := 2.5*mm
t = 2.5 mm
ecc := 100*mm
ecc = 100 mm
Linput := 400*mm
Linput = 400 mm
Le := max(Linput, H - 100*mm)
Le = 400 mm
nReq := 2.2
nReq = 2.2
deltaLim := 5*mm
deltaLim = 5 mm
# b es ancho y d profundidad del tubo. El brazo ecc se mide desde el eje del riel hasta la
# línea de acción de carga; debe medirse con la bolsa llena.
# SEDAC / P2.02 / MC01
# 3. Materiales y factores provisionales
SyR := 240*MPa
SyR = 240 MPa
SyS := 130*MPa
SyS = 130 MPa
SyB := 450*MPa
SyB = 450 MPa
Emod := 69000*MPa
Emod = 69000 MPa
nu := 0.33
nu = 0.33
rho := 2700*kg/m^3
rho = 2700 kg/m^3
Kt := 2
Kt = 2
Kslot := 1.5
Kslot = 1.5
Kb := 1.2
Kb = 1.2
# SyR: 6061-T6 sin soldar; SyS: 5052-H32, valor conservador adoptado; SyB: tornillos A2-70.
# Confirmar aleación, temple, producto y certificado.
# Kt y Kslot son amplificaciones provisionales: no son factores de concentración determinados
# por FEA. El margen objetivo es una decisión del proyecto.
# SEDAC / P2.02 / MC01
# 4. Propiedades exactas de la sección redondeada
# Se resta el contorno interior del exterior, con radios ro = 2t y ri = t. Las funciones
# siguientes permiten cambiar b, d y t manteniendo las unidades.
c0 := 1 - π/4
c0 = 0.214602
c1 := 1/3 - π/16
c1 = 0.136984
Jc(c, r) := c0*c^2*r^2 + c*r^3/3 + c1*r^4
Ar(B, D, R) := B*D - (4 - π)*R^2
Ir(B, D, R) := B*D^3/12 - 4*Jc(D/2 - R, R)
ro := 2*t
ro = 5 mm
ri := t
ri = 2.5 mm
Area := Ar(b, d, ro) - Ar(b - 2*t, d - 2*t, ri)
Area = 333.905 mm^2
Ix := Ir(b, d, ro) - Ir(b - 2*t, d - 2*t, ri)
Ix = 32784 mm^4
Iz := Ir(d, b, ro) - Ir(d - 2*t, b - 2*t, ri)
Iz = 98865.9 mm^4
# Ir(B,D,R) es el segundo momento alrededor del eje paralelo a B. Este desarrollo analítico
# sustituye el contorno discretizado del cálculo anterior.
# SEDAC / P2.02 / MC01
# 5. Riel: solicitaciones normales
Zx := Ix/(d/2)
Zx = 2622.72 mm^3
Zz := Iz/(b/2)
Zz = 3954.64 mm^3
MassR := 2*H*Area*rho
MassR = 0.901543 kg
Nr := eta*Fv
Nr = 515.025 N
Me := eta*Fv*ecc
Me = 51502.5 N*mm
SigAx := Nr/Area
SigAx = 1.54243 MPa
SigEc := Me/Zx
SigEc = 19.6371 MPa
SigH := eta*Fh*Le*sqrt(1/Zx^2 + 1/Zz^2)
SigH = 31.4175 MPa
SigN := SigAx + SigEc + SigH
SigN = 52.597 MPa
# SigH maximiza la suma de flexiones para una fuerza horizontal resultante de módulo Fh. Se
# usa una idealización de riel en voladizo.
# SEDAC / P2.02 / MC01
# 6. Riel: torsión, fluencia y flecha
Am := (b - t)*(d - t) - (4 - π)*(1.5*t)^2
Am = 1056.68 mm^2
Tr := eta*Fh*Sep/2
Tr = 17167.5 N*mm
TauT := Tr/(2*Am*t)
TauT = 3.24933 MPa
TauV := eta*sqrt(Fv^2 + Fh^2)/Area
TauV = 1.62586 MPa
# TauV reproduce una envolvente conservadora del prediseño: incluye la fuerza vertical en
# cortante medio aunque el riel también la recibe axialmente. No es un campo local de
# tensiones.
SigVM := Kt*sqrt(SigN^2 + 3*(TauT + TauV)^2)
SigVM = 106.541 MPa
nR := SyR/SigVM
nR = 2.25265
deltaH := eta*Fh*Le^3/(3*Emod*min(Ix, Iz))
deltaH = 1.61903 mm
deltaE := Me*Le^2/(2*Emod*Ix)
deltaE = 1.82141 mm
deltaR := deltaH + deltaE
deltaR = 3.44044 mm
# Contrastar nR con nReq y deltaR con deltaLim. La suma de flechas es una cota orientativa,
# dependiente de las condiciones reales del arnés.
# SEDAC / P2.02 / MC01
# 7. Riel: estimaciones de estabilidad
Kcol := 2
Kcol = 2
Pcr := π^2*Emod*min(Ix, Iz)/(Kcol*Le)^2
Pcr = 34884.4 N
nEuler := Pcr/Nr
nEuler = 67.7334
bp := max(b, d) - 4*t
bp = 40 mm
kplate := 4
kplate = 4
SigCr := kplate*π^2*Emod/(12*(1 - nu^2))*(t/bp)^2
SigCr = 995.087 MPa
SigCap := min(SyR, SigCr)
SigCap = 240 MPa
# Euler supone una columna ideal con longitud efectiva 2Le. El pandeo local supone una pared
# apoyada y sin agujeros. Si SigCr supera SyR, la fluencia ocurre antes que ese pandeo
# elástico.
# No se han calculado pandeo flexotorsional, imperfecciones ni estabilidad de las uniones. No
# se interpreta nEuler como seguridad global.
# SEDAC / P2.02 / MC01
# 8. Cartelas: tornillos M8 y reparto de esfuerzos
pitch := 45*mm
pitch = 45 mm
armH := 62.5*mm
armH = 62.5 mm
As8 := 36.6*mm^2
As8 = 36.6 mm^2
dia8 := 8*mm
dia8 = 8 mm
Vy := eta*Fv
Vy = 515.025 N
Vz := eta*Fh
Vz = 171.675 N
MomC := eta*(Fv*ecc + Fh*armH)
MomC = 62232.2 N*mm
R8old := Kb*sqrt((sqrt(Vy^2 + Vz^2)/2)^2 + (MomC/pitch)^2)
R8old = 1691.19 N
R8 := Kb*sqrt((Vy/2)^2 + (Vz/2 + MomC/pitch)^2)
R8 = 1789.41 N
# Corrección: la fuerza horizontal directa y el esfuerzo producido por el momento se suman en
# el tornillo crítico antes de obtener la resultante. R8old se conserva solo para comparar.
# SEDAC / P2.02 / MC01
# 9. Cartelas: cortante, aplastamiento y arrancamiento
tg := 4*mm
tg = 4 mm
VM8 := sqrt(3)*R8/As8
VM8 = 84.6819 MPa
nBolt8 := SyB/VM8
nBolt8 = 5.31401
BearR := R8/(dia8*t)
BearR = 89.4707 MPa
nBearR := SyR/BearR
nBearR = 2.68244
BearG := R8/(dia8*tg)
BearG = 55.9192 MPa
nBearG := SyS/BearG
nBearG = 2.32478
edge := min(15*mm, d/2)
edge = 12.5 mm
hole8 := 8.6*mm
hole8 = 8.6 mm
TearG := sqrt(3)*R8/(2*(edge - hole8/2)*tg)
TearG = 47.2463 MPa
nTearG := SyS/TearG
nTearG = 2.75154
# Se usa una sola pared del tubo para aplastamiento y sección resistente de rosca para
# cortante del tornillo. Sin crédito de fricción ni reparto por la segunda pared.
# SEDAC / P2.02 / MC01
# 10. Cartela: raíz y límites de la unión
hRoot := 80*mm
hRoot = 80 mm
Vcart := sqrt(Vy^2 + Vz^2)
Vcart = 542.884 N
SigRoot := 6*MomC/(tg*hRoot^2)
SigRoot = 14.5857 MPa
TauRoot := Vcart/(tg*hRoot)
TauRoot = 1.69651 MPa
VMroot := 2*sqrt(SigRoot^2 + 3*TauRoot^2)
VMroot = 29.7574 MPa
nRoot := SyS/VMroot
nRoot = 4.36866
# Modelo de sección rectangular idealizada con amplificación local 2. El recorte de
# aligeramiento, el pliegue y el ala requieren un análisis local.
# El cálculo anterior revisa cortante externo del M8; no verifica tracción por palanca,
# apertura, precarga, aplastamiento bajo cabeza/arandela ni pérdida de apriete. Los casquillos
# deben ajustar al tubo real.
# La posición de las fijaciones principales evita depender de plástico comprimido para
# sostener la precarga. La longitud y tolerancia de casquillos aún deben especificarse.
# SEDAC / P2.02 / MC01
# 11. Cuna: apoyo del piso y cargas locales
Width := 300*mm
Width = 300 mm
Depth := 125*mm
Depth = 125 mm
tf := 2.5*mm
tf = 2.5 mm
spanF := Depth - 60*mm
spanF = 65 mm
over := 40*mm
over = 40 mm
Ppatch := 100*N
Ppatch = 100 N
strip := 50*mm
strip = 50 mm
qfloor := 2*Fv/(Width*Depth)
qfloor = 0.03924 MPa
Mspan := qfloor*spanF^2/8 + Ppatch*spanF/(4*strip)
Mspan = 53.2236 N
Medge := qfloor*over^2/2 + Ppatch*over/strip
Medge = 111.392 N
# Se usan ejes de refuerzos como líneas de apoyo: separación 65 mm y voladizo 40 mm. El piso
# se idealiza por franjas de ancho unitario. Mspan y Medge son momentos por unidad de ancho,
# de unidad N. La carga localizada se coloca por separado entre apoyos y en el extremo del
# voladizo.
# SEDAC / P2.02 / MC01
# 12. Cuna: resultado del caso de borde
Mfloor := max(Mspan, Medge)
Mfloor = 111.392 N
SigFloor := 6*Mfloor/tf^2
SigFloor = 106.936 MPa
nFloor := SyS/SigFloor
nFloor = 1.21568
tNeed := sqrt(6*Mfloor*nReq/SyS)
tNeed = 3.36312 mm
tfProp := 3.5*mm
tfProp = 3.5 mm
SigProp := 6*Mfloor/tfProp^2
SigProp = 54.5593 MPa
nProp := SyS/SigProp
nProp = 2.38273
# Con las entradas iniciales, el caso de carga localizada en el borde no alcanza el margen
# objetivo para el piso de 2,5 mm. La memoria propone comparar 3,5 mm o reducir el voladizo.
# La alternativa tfProp es una evaluación de cálculo. El CAD P2.02 conserva 2,5 mm: esta
# memoria no modifica automáticamente el modelo.
# El contacto real de una bolsa flexible puede distribuir la fuerza de otra forma. El parche
# de 100 N y su ancho son hipótesis que deben contrastarse.
# SEDAC / P2.02 / MC01
# 13. Refuerzos inferiores y puente del anclaje de hombro
br := 20*mm
br = 20 mm
tr := 1.5*mm
tr = 1.5 mm
Irib := Ir(br, br, 2*tr) - Ir(br - 2*tr, br - 2*tr, tr)
Irib = 5827.22 mm^4
Zrib := Irib/(br/2)
Zrib = 582.722 mm^3
Lrib := Sep + b
Lrib = 250 mm
SigRib := eta*Fv*Lrib/(4*Zrib)
SigRib = 55.2391 MPa
nRib := SyR/SigRib
nRib = 4.34475
slot := 52*mm
slot = 52 mm
bridgeS := 24*mm
bridgeS = 24 mm
ta := 5*mm
ta = 5 mm
SigSlot := Kslot*6*eta*Fv*slot/4/(bridgeS*ta^2)
SigSlot = 100.43 MPa
nSlot := SyR/SigSlot
nSlot = 2.38973
# Se usa un tubo inferior con esquinas redondeadas y carga puntual equivalente. El puente de
# la cinta se aproxima como viga apoyada bajo fuerza fuera del plano.
# SEDAC / P2.02 / MC01
# 14. Yugo de cinturón y diagonales
tb := 5*mm
tb = 5 mm
bridgeB := 26*mm
bridgeB = 26 mm
SigBelt := Kslot*6*eta*Fv*slot/4/(bridgeB*tb^2)
SigBelt = 92.7045 MPa
nBelt := SyR/SigBelt
nBelt = 2.58887
Zbelt := 100*mm*tb^2/6
Zbelt = 416.667 mm^3
SigYoke := 2*eta*Fv*40*mm/Zbelt
SigYoke = 98.8848 MPa
nYoke := SyR/SigYoke
nYoke = 2.42707
riseX := H - 30*mm - (120*mm + 30*mm)
riseX = 320 mm
LenX := sqrt(Sep^2 + riseX^2)
LenX = 377.359 mm
ForceX := Fh*LenX/Sep
ForceX = 462.737 N
NetX := 2*mm*(24*mm - 6.6*mm)
NetX = 34.8 mm^2
nX := SyS/(ForceX/NetX)
nX = 9.77662
# Solo se acredita la diagonal traccionada; la opuesta puede pandear. Falta verificar herrajes
# del cinturón, costuras, liberación y transferencia real a la cadera.
# SEDAC / P2.02 / MC01
# 15. M6, criterios y verificaciones que siguen abiertas
As6 := 20.1*mm^2
As6 = 20.1 mm^2
R6 := Kb*eta*Fv/2
R6 = 309.015 N
VM6 := sqrt(3)*R6/As6
VM6 = 26.6283 MPa
nM6 := SyB/VM6
nM6 = 16.8993
MinYield := min(nR, nBolt8, nBearR, nBearG, nTearG, nRoot, nFloor, nRib, nSlot, nBelt, nYoke, nX, nM6)
MinYield = 1.21568
# MinYield reúne márgenes de modelos parciales para localizar el resultado menor. No
# representa un factor de seguridad global del sistema.
# Fatiga: falta espectro de ciclos y curvas S-N del detalle real. No se asigna vida útil.
# Uniones: faltan tracción, precarga, aflojamiento y palanca.
# Temperatura: materiales de contacto sin calificación para fuego.
# Ergonomía: faltan mediciones de bomba, cuerpo, arnés y presión de contacto.
# El criterio de Von Mises se aplica como aproximación a fluencia de materiales dúctiles. No
# sustituye criterios de fractura, fatiga ni ensayos de los textiles.
# SEDAC / P2.02 / MC01
# 16. Resumen calculado y comparación con P2.02
# Para aceptar cada precriterio de fluencia: n >= nReq. Para flecha: deltaR <= deltaLim. Los
# resultados se recalculan al modificar las entradas de páginas anteriores.
nReq = 2.2
nR = 2.25265
deltaR = 3.44044 mm
nBolt8 = 5.31401
nBearR = 2.68244
nBearG = 2.32478
nTearG = 2.75154
nRoot = 4.36866
nFloor = 1.21568
nRib = 4.34475
nSlot = 2.38973
nBelt = 2.58887
nYoke = 2.42707
nX = 9.77662
nM6 = 16.8993
# La revisión corrige dos aspectos del cálculo previo: suma vectorial en M8 y parche en el
# borde del piso. Con entradas iniciales, la cuna requiere revisión para alcanzar el margen
# objetivo.
# SEDAC / P2.02 / MC01
# 17. Estado del modelo, fuentes y uso de la memoria
# Modelo geométrico de referencia: 54 diseños de piezas, 70 ocurrencias y cero interferencias
# volumétricas en Inventor. Masa representada aproximada: 3,206 kg, sin arnés completo. Estos
# datos son registros del CAD; no se recalculan al editar esta hoja.
# Las dimensiones oficiales de bolsa vacía no describen la forma de la bolsa llena. La masa de
# referencia de 25 kg y los factores de carga fueron elegidos para prediseño.
# Fuentes técnicas:
# [1] Scotty Firefighter, catálogo oficial, Alpha Backpack 4000-BP: capacidad 19 L y conexión
# inferior central.
# [2] Hydro, Alloy 6061, ficha de extrusión: propiedades según temple y producto.
# [3] Atlas Steels, ficha 5052 y Technical Note 14: propiedades y diferencias entre
# especificaciones.
# [4] Bossard, Stainless steel fasteners, ISO 3506: clase A2-70.
# [5] NASA RP-1228, Fastener Design Manual, 1990: revisión de grupos de tornillos y cargas
# combinadas.
# Enlaces completos y auditoría: LEEME_MEMORIA.md y REVISION_CALCULOS.md, junto a esta hoja.
# No se declara conformidad con normas aeroespaciales.
# Uso: editar entradas azules, recalcular la hoja y revisar los márgenes y unidades. La
# modificación de esta memoria no actualiza el CAD ni sus archivos JSON. Al cambiar la
# geometría deben revisarse apoyos, brazos y cargas.
# Fecha de revisión: 15/10/2026. Versión documental MC01. Documento de trabajo sujeto a
# revisión técnica y pruebas de banco.
