# Title: SEDAC P2.03 - Memoria de cálculo preliminar
# Description: Prediseño; entradas editables y verificaciones dimensionales. Rev. MC02. Sin validación física.
# SEDAC / P2.03 / MC02
# 1. Alcance y cargas
# P2.03 / MC02 / 16-10-2026. Prediseño editable; no ensayo.
# Se mantiene el escenario de P2.02. La reducción de masa no se obtiene reduciendo las
# fuerzas. La masa real de la bomba, su centro de gravedad y el arnés siguen pendientes.
Mass := 25*kg
Mass = 25 kg
grav := 9.81*m/s^2
grav = 9.81 m/s^2
av := 3
av = 3
ah := 1
ah = 1
eta := 0.7
eta = 0.7
Fv := Mass*grav*av
Fv = 735.75 N
Fh := Mass*grav*ah
Fh = 245.25 N
# Mass=25 kg es la masa TOTAL de cálculo: bomba, líquido, estructura, arnés y accesorios. No
# son 25 kg de bomba más el soporte. av=3 corresponde a 3g totales; eta=0,7 representa el lado
# más cargado. Si la masa total real supera 25 kg, recalcular.
# SEDAC / P2.03 / MC02
# 2. Geometría y criterio
H := 500*mm
H = 500 mm
Sep := 200*mm
Sep = 200 mm
b := 50*mm
b = 50 mm
d := 40*mm
d = 40 mm
t := 1.5*mm
t = 1.5 mm
tmin := 1.4*mm
tmin = 1.4 mm
ecc := 107.5*mm
ecc = 107.5 mm
Le := 423*mm
Le = 423 mm
nReq := 2.2
nReq = 2.2
deltaLim := 5*mm
deltaLim = 5 mm
# ecc pasa de 100 a 107,5 mm por la mayor profundidad del riel. Le pasa de 400 a 423 mm por la
# elevación de la cuna y su protector. Ambos ajustes son supuestos conservados para comparar,
# pendientes de medir.
# SEDAC / P2.03 / MC02
# 3. Materiales y factores locales
SyR := 240*MPa
SyR = 240 MPa
SyS := 130*MPa
SyS = 130 MPa
SyB := 600*MPa
SyB = 600 MPa
Eal := 69000*MPa
Eal = 69000 MPa
nu := 0.33
nu = 0.33
Kt := 2
Kt = 2
Kb := 1.2
Kb = 1.2
Kslot := 1.5
Kslot = 1.5
rhoAl := 2700*kg/m^3
rhoAl = 2700 kg/m^3
# 6061-T6 sin soldar: 240 MPa. 5052-H32: 130 MPa conservador condicionado a certificado.
# Tornillos A2-80: 600 MPa. Kt, Kb y Kslot son factores provisionales; no proceden de FEA del
# detalle.
# SEDAC / P2.03 / MC02
# 4. Funciones para el tubo de esquinas redondeadas
cero := 1 - π/4
cero = 0.214602
cuno := 1/3 - π/16
cuno = 0.136984
Jc(c, r) := cero*c^2*r^2 + c*r^3/3 + cuno*r^4
Ar(B, DD, R) := B*DD - (4 - π)*R^2
Ir(B, DD, R) := B*DD^3/12 - 4*Jc(DD/2 - R, R)
# Ar devuelve área; Ir devuelve segundo momento de área. Jc resta una esquina, no es una
# constante de torsión. Los argumentos B, DD, R, c y r son variables locales de la función; no
# necesitan definición global.
# SEDAC / P2.03 / MC02
# 5. Sección nominal del riel
ro := 2*t
ro = 3 mm
ri := t
ri = 1.5 mm
Area := Ar(b, d, ro) - Ar(b - 2*t, d - 2*t, ri)
Area = 255.206 mm^2
Ix := Ir(b, d, ro) - Ir(b - 2*t, d - 2*t, ri)
Ix = 66024.1 mm^4
Iz := Ir(d, b, ro) - Ir(d - 2*t, b - 2*t, ri)
Iz = 93006.7 mm^4
Zx := Ix/(d/2)
Zx = 3301.21 mm^3
Zz := Iz/(b/2)
Zz = 3720.27 mm^3
mRails := 2*H*Area*rhoAl
mRails = 0.689056 kg
# La masa de esta expresión corresponde a tubos continuos antes de taladrar. La masa entregada
# se obtiene del CAD taladrado con densidad asignada.
# SEDAC / P2.03 / MC02
# 6. Riel: envolvente de flexión y torsión
Nr := eta*Fv
Nr = 515.025 N
Me := eta*Fv*ecc
Me = 55.3652 N*m
SigAx := Nr/Area
SigAx = 2.01808 MPa
SigEc := Me/Zx
SigEc = 16.7712 MPa
SigH := eta*Fh*Le*sqrt(1/Zx^2 + 1/Zz^2)
SigH = 29.4094 MPa
Am := (b - t)*(d - t) - (4 - π)*(1.5*t)^2
Am = 1862.9 mm^2
Tr := eta*Fh*Sep/2
Tr = 17.1675 N*m
TauT := Tr/(2*Am*t)
TauT = 3.07182 MPa
TauV := eta*sqrt(Fv^2 + Fh^2)/Area
TauV = 2.12724 MPa
# SEDAC / P2.03 / MC02
# 6. Riel: envolvente de flexión y torsión (continuación)
SigVM := Kt*sqrt((SigAx + SigEc + SigH)^2 + 3*(TauT + TauV)^2)
SigVM = 98.0653 MPa
nRail := SyR/SigVM
nRail = 2.44735
# La envolvente mantiene el modelo previo: flexión biaxial, torsión de tubo cerrado y cortante
# medio. V/A no reproduce el campo local ni las tensiones de los taladros. La combinación de
# máximos no es una solución tridimensional del arnés.
# SEDAC / P2.03 / MC02
# 7. Riel: flecha y pandeo ideal
deltaH := eta*Fh*Le^3/(3*Eal*min(Ix, Iz))
deltaH = 0.950726 mm
deltaE := Me*Le^2/(2*Eal*Ix)
deltaE = 1.08727 mm
deltaR := deltaH + deltaE
deltaR = 2.03799 mm
Pcr := π^2*Eal*min(Ix, Iz)/(2*Le)^2
Pcr = 62821.8 N
nEuler := Pcr/Nr
nEuler = 121.978
bflat := max(b, d) - 4*t
bflat = 44 mm
SigLocal := 4*π^2*Eal/(12*(1 - nu^2))*(t/bflat)^2
SigLocal = 296.059 MPa
CapLocal := min(SyR, SigLocal)
CapLocal = 240 MPa
# Euler usa longitud equivalente de voladizo K=2; la placa usa k=4 y pared ideal. No se
# acredita resistencia mayor que la fluencia. Taladros, imperfecciones y contacto real
# requieren comprobación del detalle.
# SEDAC / P2.03 / MC02
# 8. Pared mínima admisible del perfil
Amin := Ar(b, d, 2*tmin) - Ar(b - 2*tmin, d - 2*tmin, tmin)
Amin = 239.113 mm^2
IminX := Ir(b, d, 2*tmin) - Ir(b - 2*tmin, d - 2*tmin, tmin)
IminX = 62217.9 mm^4
IminZ := Ir(d, b, 2*tmin) - Ir(d - 2*tmin, b - 2*tmin, tmin)
IminZ = 87601.4 mm^4
ZXmin := 2*IminX/d
ZXmin = 3110.89 mm^3
ZZmin := 2*IminZ/b
ZZmin = 3504.06 mm^3
AMmin := (b - tmin)*(d - tmin) - (4 - π)*(1.5*tmin)^2
AMmin = 1872.17 mm^2
Nmin := Nr/Amin + Me/ZXmin + eta*Fh*Le*sqrt(1/ZXmin^2 + 1/ZZmin^2)
Nmin = 51.1665 MPa
# SEDAC / P2.03 / MC02
# 8. Pared mínima admisible del perfil (continuación)
Tmin := Tr/(2*AMmin*tmin) + eta*sqrt(Fv^2 + Fh^2)/Amin
Tmin = 5.54535 MPa
nMinWall := SyR/(Kt*sqrt(Nmin^2 + 3*Tmin^2))
nMinWall = 2.30503
# 1,4 mm es un límite de recepción propuesto, no una tolerancia comercial asegurada. Comprar
# solo después de confirmar sección, radios, temple y espesor real.
# SEDAC / P2.03 / MC02
# 9. Cartela: dos M6 y pasadores huecos
pitch8 := 80*mm
pitch8 = 80 mm
armH := 75.0*mm
armH = 75 mm
tg := 3*mm
tg = 3 mm
tfl := 5*mm
tfl = 5 mm
Vy := eta*Fv
Vy = 515.025 N
Vz := eta*Fh
Vz = 171.675 N
MomC := eta*(Fv*ecc + Fh*armH)
MomC = 68.2408 N*m
Rpin := Kb*sqrt((Vy/2)^2 + (Vz/2 + MomC/pitch8)^2)
Rpin = 1168.23 N
nBearR := SyR/(Rpin/(10*mm*tmin))
nBearR = 2.87615
# SEDAC / P2.03 / MC02
# 9. Cartela: dos M6 y pasadores huecos (continuación)
nBearG := SyR/(Rpin/(10*mm*tg))
nBearG = 6.16318
edge8 := 15*mm
edge8 = 15 mm
nTearG := SyR/(sqrt(3)*Rpin/(2*(edge8 - 10.2*mm/2)*tg))
nTearG = 7.04546
# Se suman por componentes el cortante directo y el debido al momento. No se acredita
# fricción. La cartela es 6061 mecanizado; no es una chapa 5052 doblada con ala de espesor
# diferente.
# SEDAC / P2.03 / MC02
# 10. Cartela: raíz y ala de apoyo
hroot := 115*mm
hroot = 115 mm
SigRoot := 6*MomC/(tg*hroot^2)
SigRoot = 10.32 MPa
TauRoot := sqrt(Vy^2 + Vz^2)/(tg*hroot)
TauRoot = 1.57358 MPa
nRoot := SyR/(2*sqrt(SigRoot^2 + 3*TauRoot^2))
nRoot = 11.2425
armFl := 8*mm
armFl = 8 mm
widthFl := 10*mm
widthFl = 10 mm
SigFl := 6*eta*Fv*armFl/(widthFl*tfl^2)
SigFl = 98.8848 MPa
nFlange := SyR/SigFl
nFlange = 2.42707
# Se asigna 70% de toda Fv a un apoyo para revisar el ala. El brazo de 8 mm llega hasta el eje
# del M5; no se permite adelgazarla a 3 mm. El cálculo de raíz no acredita el radio interior
# ni la concentración del vaciado.
# SEDAC / P2.03 / MC02
# 11. Piso: carga distribuida y parche
W := 300*mm
W = 300 mm
Depth := 125*mm
Depth = 125 mm
tf := 2.5*mm
tf = 2.5 mm
span := 45*mm
span = 45 mm
over := 20*mm
over = 20 mm
strip := 50*mm
strip = 50 mm
Patch := 100*N
Patch = 100 N
pressure := 2*Fv/(W*Depth)
pressure = 0.03924 MPa
Mspan := pressure*span^2/8 + Patch*span/(4*strip)
Mspan = 32.4326 N
Medge := pressure*over^2/2 + Patch*over/strip
Medge = 47.848 N
# SEDAC / P2.03 / MC02
# 11. Piso: carga distribuida y parche (continuación)
Mfloor := max(Mspan, Medge)
Mfloor = 47.848 N
SigFloor := 6*Mfloor/tf^2
SigFloor = 45.9341 MPa
nFloor := SyS/SigFloor
nFloor = 2.83014
tNeed := sqrt(6*Mfloor*nReq/SyS)
tNeed = 2.20418 mm
# M es momento por unidad de ancho y tiene unidad N. Presión doble y parche son una envolvente
# local; su suma no es un caso global en equilibrio. Se retiene 2,5 mm. El tercer apoyo exige
# comprobar la nueva salida frontal con la bomba real.
# SEDAC / P2.03 / MC02
# 12. Refuerzos bajo la cuna
rh := 20*mm
rh = 20 mm
rd := 10*mm
rd = 10 mm
rt := 1.5*mm
rt = 1.5 mm
Irib := Ir(rd, rh, 2*rt) - Ir(rd - 2*rt, rh - 2*rt, rt)
Irib = 3254.72 mm^4
Zrib := Irib/(rh/2)
Zrib = 325.472 mm^3
Lrib := Sep + b
Lrib = 250 mm
SigRib := eta*Fv*Lrib/(4*Zrib)
SigRib = 98.8995 MPa
nRib := SyR/SigRib
nRib = 2.4267
nRibBear := SyR/(eta*Fv/(5*mm*rt))
nRibBear = 3.49498
# Tres tubos 20x10x1,5; el modelo asigna 70% de Fv a un solo tubo y usa luz 250 mm, mayor que
# la distancia entre ejes M5. La carga vertical apoya sobre cartelas; el M5 retiene el
# conjunto y el casquillo evita aplastamiento por apriete.
# SEDAC / P2.03 / MC02
# 13. Anclajes nervados: sección de los puentes
ta := 2*mm
ta = 2 mm
tp := 1.8*mm
tp = 1.8 mm
dp := 18*mm
dp = 18 mm
slot := 52*mm
slot = 52 mm
# Anclajes mecanizados 6061-T6: alma nominal 2 mm y retorno hasta 18 mm. Se calcula con pared
# mínima 1,8 mm. El puente es una sección L asimétrica; usar solo I/c sería incorrecto por el
# producto de inercia.
# SEDAC / P2.03 / MC02
# 14. Puente hombro: flexión asimétrica
Lsa := 24*mm
Lsa = 24 mm
LsA := Lsa*tp + (dp - tp)*tp
LsA = 72.36 mm^2
Lsy := (Lsa*tp*Lsa/2 + (dp - tp)*tp*(Lsa - tp/2))/LsA
Lsy = 16.4731 mm
Lsz := (Lsa*tp*tp/2 + (dp - tp)*tp*(dp + tp)/2)/LsA
Lsz = 4.52687 mm
LsIy := Lsa*tp^3/3 + tp*(dp^3 - tp^3)/3 - LsA*Lsz^2
LsIy = 2059.52 mm^4
LsIz := tp*Lsa^3/3 + (dp - tp)*(Lsa^3 - (Lsa - tp)^3)/3 - LsA*Lsy^2
LsIz = 4226.43 mm^4
LsIyz := Lsa^2*tp^2/4 + (Lsa^2 - (Lsa - tp)^2)*(dp^2 - tp^2)/4 - LsA*Lsy*Lsz
LsIyz = 1739.15 mm^4
# SEDAC / P2.03 / MC02
# 14. Puente hombro: flexión asimétrica (continuación)
LsDet := LsIy*LsIz - LsIyz^2
LsDet = 5679753 mm^8
Ls1 := (LsIz*(0*mm - Lsz) - LsIyz*(0*mm - Lsy))/LsDet
Ls1 = 0.00167557 1/mm^3
Ls2 := (LsIz*(0*mm - Lsz) - LsIyz*(Lsa - Lsy))/LsDet
Ls2 = -0.00567329 1/mm^3
Ls3 := (LsIz*(dp - Lsz) - LsIyz*(Lsa - Lsy))/LsDet
Ls3 = 0.00772091 1/mm^3
Ls4 := (LsIz*(dp - Lsz) - LsIyz*(Lsa - tp - Lsy))/LsDet
Ls4 = 0.00827208 1/mm^3
Ls5 := (LsIz*(tp - Lsz) - LsIyz*(Lsa - tp - Lsy))/LsDet
Ls5 = -0.0037827 1/mm^3
Ls6 := (LsIz*(tp - Lsz) - LsIyz*(0*mm - Lsy))/LsDet
Ls6 = 0.00301499 1/mm^3
# SEDAC / P2.03 / MC02
# 14. Puente hombro: flexión asimétrica (continuación)
LsZ := 1/max(|Ls1|, |Ls2|, |Ls3|, |Ls4|, |Ls5|, |Ls6|)
LsZ = 120.889 mm^3
nSlot := SyR/(Kslot*eta*Fv*slot/(4*LsZ))
nSlot = 2.88891
# Se evalúan los seis vértices reales de la L. El máximo valor absoluto determina el módulo
# resistente efectivo. Se conservan 52 mm de luz y el factor local 1,5; no se acredita la
# rigidez de la cinta.
# SEDAC / P2.03 / MC02
# 15. Puente cinturón: flexión asimétrica
Lba := 26*mm
Lba = 26 mm
LbA := Lba*tp + (dp - tp)*tp
LbA = 75.96 mm^2
Lby := (Lba*tp*Lba/2 + (dp - tp)*tp*(Lba - tp/2))/LbA
Lby = 17.645 mm
Lbz := (Lba*tp*tp/2 + (dp - tp)*tp*(dp + tp)/2)/LbA
Lbz = 4.35498 mm
LbIy := Lba*tp^3/3 + tp*(dp^3 - tp^3)/3 - LbA*Lbz^2
LbIy = 2105.6 mm^4
LbIz := tp*Lba^3/3 + (dp - tp)*(Lba^3 - (Lba - tp)^3)/3 - LbA*Lby^2
LbIz = 5274.66 mm^4
LbIyz := Lba^2*tp^2/4 + (Lba^2 - (Lba - tp)^2)*(dp^2 - tp^2)/4 - LbA*Lby*Lbz
LbIyz = 1956.48 mm^4
# SEDAC / P2.03 / MC02
# 15. Puente cinturón: flexión asimétrica (continuación)
LbDet := LbIy*LbIz - LbIyz^2
LbDet = 7278495 mm^8
Lb1 := (LbIz*(0*mm - Lbz) - LbIyz*(0*mm - Lby))/LbDet
Lb1 = 0.00158703 1/mm^3
Lb2 := (LbIz*(0*mm - Lbz) - LbIyz*(Lba - Lby))/LbDet
Lb2 = -0.00540186 1/mm^3
Lb3 := (LbIz*(dp - Lbz) - LbIyz*(Lba - Lby))/LbDet
Lb3 = 0.00764258 1/mm^3
Lb4 := (LbIz*(dp - Lbz) - LbIyz*(Lba - tp - Lby))/LbDet
Lb4 = 0.00812642 1/mm^3
Lb5 := (LbIz*(tp - Lbz) - LbIyz*(Lba - tp - Lby))/LbDet
Lb5 = -0.00361357 1/mm^3
Lb6 := (LbIz*(tp - Lbz) - LbIyz*(0*mm - Lby))/LbDet
Lb6 = 0.00289147 1/mm^3
# SEDAC / P2.03 / MC02
# 15. Puente cinturón: flexión asimétrica (continuación)
LbZ := 1/max(|Lb1|, |Lb2|, |Lb3|, |Lb4|, |Lb5|, |Lb6|)
LbZ = 123.055 mm^3
nBelt := SyR/(Kslot*eta*Fv*slot/(4*LbZ))
nBelt = 2.94069
# Se evalúan los seis vértices reales de la L. El máximo valor absoluto determina el módulo
# resistente efectivo. Se conservan 52 mm de luz y el factor local 1,5; no se acredita la
# rigidez de la cinta.
# SEDAC / P2.03 / MC02
# 16. Raíces de anclaje y pandeo de los retornos
Csh := 72*mm
Csh = 72 mm
CsA := Csh*tp + 2*tp*(dp - tp)
CsA = 187.92 mm^2
Csz := (Csh*tp^2/2 + tp*(dp^2 - tp^2))/CsA
Csz = 3.6931 mm
CsI := Csh*tp^3/3 + 2*tp*(dp^3 - tp^3)/3 - CsA*Csz^2
CsI = 4568.33 mm^4
CsZ := CsI/max(Csz, dp - Csz)
CsZ = 319.309 mm^3
CsSig := 2*eta*Fv*17*mm/CsZ
CsSig = 54.8398 MPa
nShoulderRoot := SyR/CsSig
nShoulderRoot = 4.37639
# SEDAC / P2.03 / MC02
# 16. Raíces de anclaje y pandeo de los retornos (continuación)
CsWeb := 2*eta*Fv*17*mm*max(Csz, |tp - Csz|)/CsI
CsWeb = 14.156 MPa
CsCr := 4*π^2*Eal/(12*(1 - nu^2))*(tp/(Csh - 2*tp))^2
CsCr = 176.414 MPa
CsnWeb := min(SyR, CsCr)/CsWeb
CsnWeb = 12.4621
Cbh := 100*mm
Cbh = 100 mm
CbA := Cbh*tp + 2*tp*(dp - tp)
CbA = 238.32 mm^2
Cbz := (Cbh*tp^2/2 + tp*(dp^2 - tp^2))/CbA
Cbz = 3.10242 mm
CbI := Cbh*tp^3/3 + 2*tp*(dp^3 - tp^3)/3 - CbA*Cbz^2
CbI = 4891.97 mm^4
# SEDAC / P2.03 / MC02
# 16. Raíces de anclaje y pandeo de los retornos (continuación)
CbZ := CbI/max(Cbz, dp - Cbz)
CbZ = 328.374 mm^3
CbSig := 2*eta*Fv*25*mm/CbZ
CbSig = 78.4206 MPa
nHipRoot := SyR/CbSig
nHipRoot = 3.06042
CbWeb := 2*eta*Fv*25*mm*max(Cbz, |tp - Cbz|)/CbI
CbWeb = 16.3311 MPa
CbCr := 4*π^2*Eal/(12*(1 - nu^2))*(tp/(Cbh - 2*tp))^2
CbCr = 88.8162 MPa
CbnWeb := min(SyR, CbCr)/CbWeb
CbnWeb = 5.43848
CrFlange := 0.43*π^2*Eal/(12*(1 - nu^2))*(tp/(dp - tp))^2
CrFlange = 338.084 MPa
# SEDAC / P2.03 / MC02
# 16. Raíces de anclaje y pandeo de los retornos (continuación)
nPanLocal := min(SyR, CrFlange)/max(SyR/nSlot, SyR/nBelt, CsSig, CbSig)
nPanLocal = 2.88891
# Raíces modeladas como canales C. Pandeo ideal de alma k=4 y retorno saliente k=0,43. Se usa
# la tensión de compresión del alma, que difiere de la máxima de la sección. Los taladros y
# radios siguen pendientes de FEA.
# SEDAC / P2.03 / MC02
# 17. Diagonales y fijaciones del marco
riseX := 305*mm
riseX = 305 mm
lenX := sqrt(Sep^2 + riseX^2)
lenX = 364.726 mm
ForceX := Fh*lenX/Sep
ForceX = 447.245 N
AnetX := 2*mm*(20*mm - 6.6*mm)
AnetX = 26.8 mm^2
nX := SyS/(ForceX/AnetX)
nX = 7.78991
nXBearing := SyS/(Kb*ForceX/(6*mm*2*mm))
nXBearing = 2.90668
nXTear := SyS/(sqrt(3)*Kb*ForceX/(2*(12*mm - 3.3*mm)*2*mm))
nXTear = 4.86671
Rframe := Kb*(Fh + ForceX)
Rframe = 830.994 N
nFrameBear := SyR/(Rframe/(6*mm*2*mm))
nFrameBear = 3.46573
# SEDAC / P2.03 / MC02
# 17. Diagonales y fijaciones del marco (continuación)
nRailFrame := SyR/(Rframe/(6*mm*tmin))
nRailFrame = 2.42601
# Solo la diagonal traccionada aporta resistencia. La comprimida no se acredita. Rframe suma
# magnitudes como envolvente local para la fijación del travesaño, aunque su equilibrio real
# puede reducir esa resultante.
# SEDAC / P2.03 / MC02
# 18. Precargas y cargas de apertura
scatter := 0.25
scatter = 0.25
prying := 1.5
prying = 1.5
F0C := 1500*N
F0C = 1500 N
F0F := 1400*N
F0F = 1400 N
F0H := 1800*N
F0H = 1800 N
F05 := 1000*N
F05 = 1000 N
PC := prying*eta*Fh/2
PC = 128.756 N
PF := PC
PF = 128.756 N
PHS := prying*eta*Fv*(0.5 + 17*mm/(30*mm))
PHS = 824.04 N
PHB := prying*eta*Fv/2*(1 + 25*mm/(20*mm))
PHB = 869.105 N
# SEDAC / P2.03 / MC02
# 18. Precargas y cargas de apertura (continuación)
PH := max(PHS, PHB)
PH = 869.105 N
P5 := prying*eta*Fv/3
P5 = 257.512 N
# Objetivos de estudio, no pares de montaje certificados. Se asigna 70% de carga a un lado y
# se reparte entre sus tres M5; apertura y palanca usan 1,5. Toda carga P se suma al tornillo
# y se resta a la compresión para cubrir por separado extremos de reparto elástico.
# SEDAC / P2.03 / MC02
# 19. Vástago liso en los planos de carga
As6 := 20.1*mm^2
As6 = 20.1 mm^2
As5 := 14.2*mm^2
As5 = 14.2 mm^2
Ash6 := π*(6*mm)^2/4
Ash6 = 28.2743 mm^2
Zsh6 := π*(6*mm)^3/32
Zsh6 = 21.2058 mm^3
droot5 := (5 - 1.22687*0.8)*mm
droot5 = 4.0185 mm
Zroot5 := π*droot5^3/32
Zroot5 = 6.37079 mm^3
RH := Kb*eta*Fv/2
RH = 309.015 N
R5 := Kb*eta*Fh/3
R5 = 68.67 N
MbC := Rpin*(tg + tmin)/2
MbC = 2.5701 N*m
MbF := Kb*(ForceX*(5*mm + tmin/2) + Fh*(1*mm + tmin/2))
MbF = 3.55947 N*m
MbH := RH*(ta + tmin)/2
MbH = 0.525326 N*m
# SEDAC / P2.03 / MC02
# 19. Vástago liso en los planos de carga (continuación)
Mb5 := R5*(tfl + rt)/2
Mb5 = 0.223178 N*m
# ISO 4762 de rosca parcial: b=2d+12 mm para las longitudes seleccionadas. En M6, el vástago
# liso debe cubrir el plano crítico; se orienta la cabeza hacia la pieza cargada. Tracción usa
# área de rosca As; cortante y flexión usan el vástago cuando queda comprobado. M5 se calcula
# con raíz de rosca.
# SEDAC / P2.03 / MC02
# 20. Tornillos: combinación con flexión local
VMC := sqrt(((F0C*(1 + scatter) + PC)/As6 + MbC/Zsh6)^2 + 3*(Rpin/Ash6)^2)
VMC = 232.191 MPa
nBoltC := SyB/VMC
nBoltC = 2.58408
VMF := sqrt(((F0F*(1 + scatter) + PF)/As6 + MbF/Zsh6)^2 + 3*(Rframe/Ash6)^2)
VMF = 266.236 MPa
nBoltF := SyB/VMF
nBoltF = 2.25364
VMH := sqrt(((F0H*(1 + scatter) + PH)/As6 + MbH/Zsh6)^2 + 3*(RH/Ash6)^2)
VMH = 180.945 MPa
nBoltH := SyB/VMH
nBoltH = 3.31592
VM5 := sqrt(((F05*(1 + scatter) + P5)/As5 + Mb5/Zroot5)^2 + 3*(R5/As5)^2)
VM5 = 141.442 MPa
nBolt5 := SyB/VM5
nBolt5 = 4.24201
# SEDAC / P2.03 / MC02
# 20. Tornillos: combinación con flexión local (continuación)
# El momento local suma la excentricidad entre centros de placas y la contribución de
# diagonal/travesaño. No se acredita fricción. Esta revisión requiere A2-80, Rp0,2 mínimo 600
# MPa a temperatura ambiente; no sustituir automáticamente por A2-70.
# SEDAC / P2.03 / MC02
# 21. Pasadores huecos de las cartelas
Apin := π/4*((10*mm)^2 - (6.6*mm)^2)
Apin = 44.3279 mm^2
Zpin := π*((10*mm)^4 - (6.6*mm)^4)/(32*10*mm)
Zpin = 79.5464 mm^3
VMPin := sqrt(((F0C*(1 + scatter) + PC)/Apin + MbC/Zpin)^2 + 3*(Rpin/Apin)^2)
VMPin = 89.9546 MPa
nPin := SyR/VMPin
nPin = 2.66801
nPinBore := SyR/(Rpin/(6*mm*tg))
nPinBore = 3.69791
# Cada pasador 6061 tiene exterior 10 mm, interior 6,6 mm y longitud nominal igual al paquete
# de 53 mm. Atraviesa cartela y ambas paredes del riel por agujeros 10,2 mm. El diámetro
# exterior distribuye el apoyo; se asigna toda la reacción tanto al pasador como al perno en
# verificaciones separadas.
# Para montaje real deben controlarse longitud/planitud y contacto bajo las arandelas. No
# aceptar un pasador sobresaliente que impida sujetar la cartela, ni uno corto que permita
# aplastar el tubo. Falta definir tolerancia final con el taller.
# SEDAC / P2.03 / MC02
# 22. Casquillos, asiento y cierre
Asp6 := π/4*((10*mm)^2 - (6.6*mm)^2)
Asp6 = 44.3279 mm^2
Asp5 := 10*mm*(rd - 4*rt) - π/4*(5.5*mm)^2
Asp5 = 16.2417 mm^2
# Los apoyos interiores M5 son bloques de 10 mm de ancho, con contorno igual al interior
# redondeado del tubo 20x10x1,5 y taladro 5,5. Se cuenta solo el asiento plano de 4 mm y se
# resta el círculo completo del taladro: área resistente conservadora. No son tubos de
# diámetro 9 mm.
nSleeve6 := SyR/((F0H*(1 + scatter) + PH)/Asp6)
nSleeve6 = 3.41082
nSleeve5 := SyR/((F05*(1 + scatter) + P5)/Asp5)
nSleeve5 = 2.58572
Aw6 := π/4*((12*mm)^2 - (6.4*mm)^2)
Aw6 = 80.9274 mm^2
Aw5 := π/4*((10*mm)^2 - (5.3*mm)^2)
Aw5 = 56.478 mm^2
nSeat6 := SyR/((F0H*(1 + scatter) + PH)/Aw6)
nSeat6 = 6.22697
# SEDAC / P2.03 / MC02
# 22. Casquillos, asiento y cierre (continuación)
nSeat5 := SyS/((F05*(1 + scatter) + P5)/Aw5)
nSeat5 = 4.87037
nPanPunch := SyR/(sqrt(3)*(F0H*(1 + scatter) + PH)/(π*12*mm*tp))
nPanPunch = 3.01456
ClampC := F0C*(1 - scatter) - PC
ClampC = 996.244 N
ClampF := F0F*(1 - scatter) - PF
ClampF = 921.244 N
ClampH := F0H*(1 - scatter) - PH
ClampH = 480.895 N
Clamp5 := F05*(1 - scatter) - P5
Clamp5 = 492.488 N
# Presión media y punzonamiento nominal: no acreditan flexión de arandela, asentamiento ni
# contacto no uniforme. Casquillos M6 internos evitan aplastar el tubo por apriete. El HDPE no
# queda dentro del paquete de apriete de las uniones primarias.
# SEDAC / P2.03 / MC02
# 23. Tuercas, par y aflojamiento
ProofNut := 800*MPa
ProofNut = 800 MPa
nProof6 := ProofNut*As6/(F0H*(1 + scatter) + PH)
nProof6 = 5.15533
nProof5 := ProofNut*As5/(F05*(1 + scatter) + P5)
nProof5 = 7.53559
Ktorque := 0.2
Ktorque = 0.2
TorqueC := Ktorque*F0C*6*mm
TorqueC = 1.8 N*m
TorqueF := Ktorque*F0F*6*mm
TorqueF = 1.68 N*m
TorqueH := Ktorque*F0H*6*mm
TorqueH = 2.16 N*m
Torque5 := Ktorque*F05*5*mm
Torque5 = 1 N*m
# La prueba de tuerca clase 80 es un criterio distinto de fluencia y exige certificado del
# producto autofrenante real. El par T=K*F0*d con K=0,20 es ilustrativo: falta sumar par
# prevalente y calibrar fricción/lubricación. No es una instrucción de apriete.
# Tuerca autofrenante metálica derivada DIN 980, arandelas planas ISO 7089 y al menos dos
# pasos de rosca salientes. Sujetar cabeza y tuerca con herramientas adecuadas; verificar
# desgaste y las reglas de reutilización del proveedor. La rosca cosmética no representa la
# deformación del autofreno. Ensayo vibratorio pendiente.
# SEDAC / P2.03 / MC02
# 24. Resumen de comprobaciones analíticas
nRail = 2.44735
nMinWall = 2.30503
nBearR = 2.87615
nBearG = 6.16318
nTearG = 7.04546
nRoot = 11.2425
nFlange = 2.42707
nFloor = 2.83014
nRib = 2.4267
nRibBear = 3.49498
nSlot = 2.88891
nBelt = 2.94069
nHipRoot = 3.06042
nShoulderRoot = 4.37639
CsnWeb = 12.4621
CbnWeb = 5.43848
nPanLocal = 2.88891
nX = 7.78991
nXBearing = 2.90668
nXTear = 4.86671
# SEDAC / P2.03 / MC02
# 24. Resumen de comprobaciones analíticas (continuación)
nFrameBear = 3.46573
nRailFrame = 2.42601
nBoltC = 2.58408
nBoltF = 2.25364
nBoltH = 3.31592
nBolt5 = 4.24201
nPin = 2.66801
nPinBore = 3.69791
nSleeve6 = 3.41082
nSleeve5 = 2.58572
nSeat6 = 6.22697
nSeat5 = 4.87037
nPanPunch = 3.01456
MinFrame := min(nRail, nMinWall, nBearR, nFlange, nFloor, nRib, nRibBear)
MinFrame = 2.30503
MinJoint := min(nBoltC, nBoltF, nBoltH, nBolt5, nPin, nPinBore, nSleeve6, nSleeve5)
MinJoint = 2.25364
# SEDAC / P2.03 / MC02
# 24. Resumen de comprobaciones analíticas (continuación)
MinHarness := min(nSlot, nBelt, nHipRoot, nShoulderRoot, CsnWeb, CbnWeb, nPanLocal)
MinHarness = 2.88891
MinBrace := min(nX, nXBearing, nXTear, nFrameBear, nRailFrame)
MinBrace = 2.42601
MinContact := min(nRoot, nBearG, nTearG, nSeat6, nSeat5, nPanPunch)
MinContact = 3.01456
MinModel := min(MinFrame, MinJoint, MinHarness, MinBrace, MinContact)
MinModel = 2.25364
# MinModel es el menor margen de estos modelos parciales, no un factor de seguridad global.
# Aceptación del prediseño: todos >=2,2; flecha <=5 mm; Clamp positivos. Las verificaciones no
# calculadas no se consideran aprobadas.
# SEDAC / P2.03 / MC02
# 25. Masa completa: CAD y reservas
# La masa CAD es una lectura de geometría y densidad; editar Mathcad no cambia esa geometría.
# Volver a generar y pesar después de cada modificación. El HDPE está incluido. La espuma
# mostrada como referencia pertenece a la reserva textil y se excluye de mCAD para no sumarla
# dos veces.
mCAD := 2.33312841344*kg
mCAD = 2.33313 kg
mHarness := 0.5*kg
mHarness = 0.5 kg
mExtra := 0.08*kg
mExtra = 0.08 kg
mTotal := mCAD + mHarness + mExtra
mTotal = 2.91313 kg
mRestante := Mass - mTotal
mRestante = 22.0869 kg
# mRestante es la parte del presupuesto de 25 kg que quedaría para bomba, líquido y elementos
# aún no incluidos. No es una capacidad de uso certificada.
mGoal := 2.0*kg
mGoal = 2 kg
mOld := 3.2062576846*kg
mOld = 3.20626 kg
savingCAD := 1 - mCAD/(mOld - 0.0532007361*kg)
savingCAD = 0.260042
# Comparación equivalente: se retira del CAD viejo la espuma de referencia 0,0532 kg porque
# está en la reserva textil. Los 0,50 kg de arnés y 0,08 kg de accesorios son reservas, no
# mediciones. No confundir reducción CAD con masa final pesada.
# SEDAC / P2.03 / MC02
# 26. Criterios de falla y trabajo pendiente
# Fluencia: Von Mises para aluminio y acero dúctiles. Aplastamiento, sección neta y
# arrancamiento: modelos locales de placa. Inestabilidad: Euler y placa ideal. Rigidez: flecha
# de viga equivalente.
# Fatiga: medir ciclos y amplitudes; obtener curvas S-N de material y detalle. Sin estos datos
# no se asigna vida. Fractura: se necesitan tamaño de defecto, geometría y tenacidad. No se
# sustituye por un margen de fluencia.
# Faltan FEA de ranuras/uniones y pandeo perforado; tolerancias, dobleces, asiento de
# casquillos, resistencia de tuercas y arandelas reales; vibración, impacto, temperatura,
# corrosión, abrasión; costuras, hebillas, presión sobre el cuerpo y liberación.
# La bolsa se debe medir llena y vacía, con manguera y arnés. La escotadura frontal cambió; si
# la manguera exige la escotadura anterior, el apoyo delantero y el piso deben recalcularse.
# Esta revisión no autoriza fabricar ni ensayar sobre una persona.
# SEDAC / P2.03 / MC02
# 27. Fuentes y uso
# Fuentes: Hydro 6061 (extrusión T6); Atlas Steels 5052 y TN14; Bossard fijaciones inoxidables
# ISO 3506; NASA RP-1228 Fastener Design Manual; documentación Autodesk Inventor sobre roscas
# cosméticas y restricciones; MIT OCW mecánica estructural. Enlaces y alcance en PDF y LEEME.
# Mathcad: editar entradas azules; Ctrl+F9 recalcula todo. := define, = evalúa, min/max
# seleccionan extremos, sqrt devuelve raíz positiva. Mayúsculas y minúsculas distinguen
# variables. Las funciones tienen argumentos locales.
# El archivo editable final tiene resultados guardados por Mathcad. Los borradores se
# mantienen en Soporte. Solo el archivo terminado en EDITABLE.xmcd es el documento de lectura
# principal.
