# Title: SEDAC P2.04-P2.05 - Memoria de calculo de prediseno y preparacion de ensayos
# Description: MC01 - 2026-10-25. Prediseno con entradas editables. No es validacion fisica ni tecnica. Los simbolos de medicion de laboratorio quedan sin definir a proposito.
# SEDAC / P2.04-P2.05 / MC01
# 0. Como usar esta memoria (para quien llega por primera vez)
# Una hoja de calculo que responde: aguanta, y cuanto margen le queda.
# QUE ES: la memoria de calculo del prototipo SEDAC. Toma la geometria vigente (P2.04), las
# cargas de uso y las propiedades del material, y calcula para cada pieza y para cada forma de
# fallo cuanto margen queda antes de que algo ceda.
# QUE NO ES: no es una validacion. No hay ensayos, no hay analisis por elementos finitos y no
# hay material comprado. Las cargas que se usan son hipotesis de prediseño declaradas como
# tales.
# COMO SE LEE: las celdas con fondo azul son ENTRADAS: se pueden cambiar y todo lo de abajo se
# recalcula. A la derecha de cada entrada aparece el valor con su unidad. Las paginas siguen
# el orden en que se lee el problema: primero los datos, despues la forma de las piezas,
# despues las cargas, despues la resistencia y al final el resumen.
# COMO SE USA: para cambiar un dato, se edita la entrada, se recalcula con Ctrl+F9 y se vuelve
# a mirar el margen minimo de la pagina 9. El archivo entrega guarda los resultados ya
# calculados, de modo que se puede revisar sin recalcular.
# SI FALTA UN DATO: los simbolos que dependen de mediciones de laboratorio (masa de la bomba,
# centro de masa, ancho de correa, medidas reales de las piezas) NO estan definidos. Si
# alguien los usa sin definirlos, Mathcad marca la expresion como error: es la manera de que
# la hoja no produzca un numero inventado. Al definirlos en la pagina 13, se activan los
# resultados que dependen de ellos.
# UNIDADES: se trabaja en mm, N, MPa y kg. Cada constante lleva su unidad escrita para que el
# verificador dimensional de Mathcad detecte cualquier mezcla.
# RESULTADO ACTUAL: con las entradas de hoy, el margen minimo del conjunto es 2,247 y el modo
# que gobierna es la fluencia bajo tension combinada: Sy_al = 240 MPa es menor que sig_placa =
# 477,699 MPa. n_local empata porque usa min(Sy_al, sig_placa), no porque gobierne el pandeo
# elastico.
# SEDAC / P2.04-P2.05 / MC01
# 0.1 Glosario de simbolos: que significa cada variable
# Todos los simbolos que aparecen en las paginas siguientes, explicados en lenguaje sencillo.
# L_canal  [mm]  -  Largo del canal vertical, de la punta de arriba a la de abajo.
# B  [mm]  -  Ancho exterior del canal, medido de cara a cara.
# D  [mm]  -  Profundidad del canal: cuanto se hunde la pieza hacia el lado de la bomba.
# t_nom  [mm]  -  Espesor nominal de la pared del canal, tal como se mecaniza.
# t_min  [mm]  -  Espesor minimo de pared que se admite para el calculo. Es mas conservador
# que el nominal y no cambia la pieza.
# z_eje  [mm]  -  A que altura dentro del canal esta el eje de los taladros de union.
# d_taladro  [mm]  -  Diametro del agujero por el que pasa el pasador.
# esp_mejilla  [mm]  -  Espesor de la placa que abraza el canal por fuera.
# L_casq  [mm]  -  Longitud del casquillo. El generador la define como B - 2t, es decir,
# exactamente el ancho interior del canal.
# holgura_axial  [mm]  -  Espacio que queda entre el casquillo y las caras interiores de
# las alas. Hoy vale cero.
# m_total  [kg]  -  Masa total que se supone que lleva el sistema. Es una hipotesis de
# carga, no la masa de la estructura.
# fv, fh  [-]  -  Cuanto se amplifica la carga de uso respecto del peso quieto: 3 veces en
# vertical y 1 en horizontal.
# frac  [-]  -  Parte de la carga que lleva el lado mas cargado (70 %) frente al otro (30
# %).
# excentricidad  [mm]  -  Distancia entre el eje del canal y el peso de la bomba. Es lo que
# hace que el canal se doble.
# precarga  [N]  -  Apriete que se aplica al tornillo de la union antes de que entre la
# carga de uso.
# margen_objetivo  [-]  -  Margen minimo que se acepta en el filtro de prediseno. Es un
# criterio del proyecto, no una norma.
# A_min, Z_min  [mm2, mm3]  -  Area y modulo elastico de la seccion del canal calculados
# con la pared minima.
# I_min, Ix_min, J_min  [mm4]  -  Inercia en los dos planos y constante de torsion de esa
# seccion.
# N_lado  [N]  -  Componente vertical de la carga en el lado mas cargado.
# Q_lado  [N]  -  Componente horizontal de la carga en el lado mas cargado.
# L_luz  [mm]  -  Distancia entre los dos apoyos: hombro y cinturón.
# M0  [N*mm]  -  Momento que produce la excentricidad del peso de la bomba.
# Mmax  [N*mm]  -  Momento maximo al que se ve sometida el canal en el caso de carga mas
# desfavorable.
# SEDAC / P2.04-P2.05 / MC01
# vm  [MPa]  -  Tension equivalente que resume la combinacion de flexion, cortante y
# torsion.
# 0.2 Glosario de conceptos: que se esta calculando
# n_min  [-]  -  El menor de los quince margenes calculados: el que manda.
# Las ideas que hay que tener presentes para leer los resultados de la memoria.
# flecha  [mm]  -  Cuanto se desplaza el canal en el punto mas cargado.
# cierre_residual  [N]  -  Cuanta precarga queda despues de absorber la traccion de la
# union.
# masa_CAD  [kg]  -  Masa de la parte rigida, medida en Inventor sobre el modelo entregado.
# masa_presupuesto  [kg]  -  Masa del sistema sin bomba ni agua, contando las reservas de
# textiles.
# bajo_cabeza, saliente  [mm]  -  Apilado de la union por debajo de la cabeza del tornillo,
# y cuanto sobra de tornillo.
# CRIBado o filtro de prediseño: una lista de comprobaciones que descarta las formas de fallo
# con poco margen. Es una criba, no una certificacion: si un margen sale bajo, el diseño se
# revisa; si todos salen bien, todavia no se ha probado nada.
# margen o factor de seguridad: cuantas veces la resistencia disponible supera a la que pide
# la carga. Un margen de 2,25 significa que la pieza aguanta 2,25 veces la carga de calculo.
# modo que gobierna: la forma de fallo que deja menos margen. Si el margen lo fija el pandeo
# local de las alas, significa que el punto debil del canal es que las alas se doblen hacia
# dentro, y no que se rompan.
# envolvente de momento: no se calcula un unico caso de carga, sino el peor de una familia de
# casos alternativos (el momento puesto en un extremo o en el otro, y la fuerza horizontal en
# cualquier punto de la luz). Por eso el resultado es un maximo, no un valor unico.
# pandeo: que una pieza se deforme por el efecto de una carga de compresion. El pandeo local
# ocurre dentro de la pieza (las alas del canal formando una onda) y el pandeo global, cuando
# la pieza entera se curva como una barra.
# precarga: el apriete del tornillo. En una union precargada las piezas no se mueven mientras
# la carga de uso es pequeña, y por eso el reparto de fuerzas depende de la rigidez relativa
# de las piezas, no solo de sus resistencias.
# apilamiento axial: la suma de los espesores que el tornillo tiene que atravesar. Si el
# apilamiento es mayor que el tornillo, no monta; si es menor, sobra longitud, y esa sobra hay
# que controlarla.
# holgura axial: el espacio entre dos piezas que se tocan en la direccion del tornillo. Con
# cero holgura, cualquier variacion de fabricacion hace que las piezas se interfieran o que
# dejen de apoyar; por eso hay que cerrar la cadena de tolerancias con medidas reales.
# resistencia frente a rigidez: la resistencia dice cuanto aguanta; la rigidez, cuanto se
# deforma. Un material mas rgido puede ser mas pesado y ese es el compromiso central de este
# prototipo.
# SEDAC / P2.04-P2.05 / MC01
# 1. Alcance, unidades y estados de los datos
# Base P2.04 vigente, parametrizacion P2.05 abierta. Motor de calculo: Mathcad 15 (XMCD
# clasico).
# QUE ES ESTE DOCUMENTO: una memoria de calculo de prediseno, editable, del prototipo SEDAC en
# su geometria vigente P2.04, con la parametrizacion P2.05 y el mismo modelo analitico que el
# cribado vigente del repositorio SEDAC_CAD. Sirve para recalcular el conjunto cuando se
# incorporen mediciones reales y para decidir cambios de geometria, material y componentes.
# QUE NO ES: no es validacion del prototipo. No hay ensayo, no hay FEA, no hay certificacion
# de material y no hay liberacion para uso con personas. Los factores de seguridad que se
# calculan son de prediseno y dependen de hipotesis de carga no medidas.
# ESTADOS USADOS: HECHO = verificable con un archivo del repositorio o un comando. MEDIDO =
# medido en instrumento, con registro. DATO DE FABRICANTE = declarado por el proveedor.
# SUPUESTO = valor adoptado sin medir. HIPOTESIS = condicion aun no comprobada. CALCULADO =
# resultado de esta hoja. PENDIENTE = sin dato.
# UNIDADES: se trabaja en mm, N, MPa y kg. Las constantes de entrada llevan su unidad escrita
# para que el verificador dimensional de Mathcad actue. Los resultados se muestran en la
# unidad de lectura propia.
# MEDIDAS DE LABORATORIO: no existen. Los simbolos que dependerian de ellas NO se definen;
# definirlos activa los bloques de verificacion que se describen en las ultimas paginas.
# ORIGEN DE LOS DATOS DE ENTRADA (solo lectura del repositorio SEDAC_CAD):
# 01_CAD/Prototipo_P2/P2_05_20261019/PARAMETROS_P2_05.json
# 01_CAD/Prototipo_P2/P2_05_20261019/Soporte/calcular_p2_05.py
# 01_CAD/Prototipo_P2/P2_05_20261019/Soporte/Iteraciones/Optimizacion_Real_20261023_014225/Analisis/V0_base_P2_05/RESULTADOS_PREDISENO.json
# 01_CAD/Prototipo_P2/P2_04_20261016/BOM_Y_MASAS.csv
# 01_CAD/Prototipo_P2/P2_04_20261016/Entrega/Inventor/MODELO_API.json
# 01_CAD/Prototipo_P2/P2_04_20261016/Entrega/Inventor/BOM_FIJACIONES.csv
# Verificaciones dimensionales explicitas:
u_fuerza := 1*kg*m/s^2
u_fuerza = 1 N
u_fuerza_ratio := u_fuerza/(1*N)
u_fuerza_ratio = 1
u_presion_ratio := 1*MPa/(1*N/mm^2)
u_presion_ratio = 1
u_area := 1*mm^2  # SEDAC / P2.04-P2.05 / MC01
# 2. Entradas geometricas del prototipo vigente
u_area = 1 mm^2
# Todas editables. Las marcadas como entrada editable tienen fondo azul en Mathcad.
u_momento := 1*N*1*mm
L_canal := 480*mm
L_canal = 480 mm
u_momento = 1 N*mm
B := 32*mm
B = 32 mm
D := 24*mm
D = 24 mm
t_nom := 3*mm
t_nom = 3 mm
t_min := 2.8*mm
t_min = 2.8 mm
r_raiz := 2*mm
r_raiz = 2 mm
sep_canales := 190*mm
sep_canales = 190 mm
z_eje := 12*mm
z_eje = 12 mm
d_taladro := 10.2*mm
d_taladro = 10.2 mm
esp_mejilla := 3*mm
esp_mejilla = 3 mm
esp_anclaje := 6*mm
esp_anclaje = 6 mm
esp_anclaje_min := 5.8*mm
esp_anclaje_min = 5.8 mm
casquillo_od := 12.5*mm
casquillo_od = 12.5 mm
pasador_od := 10*mm
pasador_od = 10 mm
pasador_id := 5.5*mm
pasador_id = 5.5 mm
L_pasador := 37.6*mm
# SEDAC / P2.04-P2.05 / MC01
L_pasador = 37.6 mm
# 3. Entradas de carga y de material (hipotesis y supuestos)
arandela_od := 16*mm
arandela_od = 16 mm
# Ninguna de estas cifras esta medida. D-14 ordena reemplazarlas por masa, reparto y apoyos
# reales.
arandela_id := 5.3*mm
arandela_id = 5.3 mm
m_total := 25*kg
m_total = 25 kg
arandela_esp := 3*mm
arandela_esp = 3 mm
g := 9.81*m/s^2
g = 9.81 m/s^2
arandela_esp_min := 2.9*mm
arandela_esp_min = 2.9 mm
fv := 3
fv = 3
separacion_pernos := 60*mm
separacion_pernos = 60 mm
fh := 1
fh = 1
dist_borde_perno := 12*mm
dist_borde_perno = 12 mm
frac := 0.7
frac = 0.7
apoyo_hombro_y := 435*mm
apoyo_hombro_y = 435 mm
excentricidad := 107.5*mm
excentricidad = 107.5 mm
apoyo_cinturon_y := 55*mm
apoyo_cinturon_y = 55 mm
precarga := 2000*N
precarga = 2000 N
alto_puente_cinta := 18*mm
alto_puente_cinta = 18 mm
angulo_eslinga := 35*π/180
angulo_eslinga = 0.610865
luz_puente_cinta := 52*mm
luz_puente_cinta = 52 mm
margen_objetivo := 2.2
margen_objetivo = 2.2
brazo_torsion := 12*mm
brazo_torsion = 12 mm
flecha_limite := 5*mm
flecha_limite = 5 mm
nu := 0.33
nu = 0.33
K_borde := 1.25
K_borde = 1.25
As_M5 := 14.2*mm^2
As_M5 = 14.2 mm^2
K_ventana := 3
K_ventana = 3
longitud_tornillo := 55*mm
longitud_tornillo = 55 mm
E_al := 69000*MPa
E_al = 69000 MPa
altura_tuerca := 5*mm
altura_tuerca = 5 mm
Sy_al := 240*MPa
Sy_al = 240 MPa
Sy_perno := 600*MPa
Sy_perno = 600 MPa
# SEDAC / P2.04-P2.05 / MC01
Sy_arandela := 200*MPa
Sy_arandela = 200 MPa
# 4. Propiedades de la seccion transversal del canal
factor_palanca := 1.5
factor_palanca = 1.5
# Seccion en U con alas de 32 x 3 y alma de 24, calculada con pared minima de 2,8 mm (caso
# conservador).
masa_CAD := 1.442328*kg
masa_CAD = 1.44233 kg
A_sec(b, d, t) := b*t + 2*t*(d - t)
reserva_textil := 0.65*kg
reserva_textil = 0.65 kg
z_sec(b, d, t) := (b*t*t/2 + 2*t*(d - t)*(t + d)/2)/A_sec(b, d, t)
reserva_adicional := 0.12*kg
reserva_adicional = 0.12 kg
I_sec(b, d, t) := b*t^3/12 + b*t*(t/2 - z_sec(b, d, t))^2 + 2*(t*(d - t)^3/12 + t*(d - t)*((t + d)/2 - z_sec(b, d, t))^2)
Ix_sec(b, d, t) := t*b^3/12 + 2*((d - t)*t^3/12 + t*(d - t)*((b - t)/2)^2)
Z_sec(b, d, t) := I_sec(b, d, t)/max(z_sec(b, d, t), d - z_sec(b, d, t))
J_sec(b, d, t) := (b + 2*(d - t))*t^3/3
# Las funciones A_sec, z_sec, I_sec, Ix_sec, Z_sec y J_sec operan en mm y devuelven mm2, mm,
# mm4, mm4, mm3 y mm4.
A_min := A_sec(B, D, t_min)
A_min = 208.32 mm^2
z_min := z_sec(B, D, t_min)
z_min = 8.23871 mm
I_min := I_sec(B, D, t_min)
I_min = 11858 mm^4
Ix_min := Ix_sec(B, D, t_min)
Ix_min = 33029.8 mm^4
Z_min := Z_sec(B, D, t_min)
Z_min = 752.348 mm^3
J_min := J_sec(B, D, t_min)
J_min = 544.41 mm^4
# SEDAC / P2.04-P2.05 / MC01
# 5. Caso de carga y envolvente de momento
# Envolvente: momento unico alternado en un extremo y fuerza horizontal de posicion variable
# en la luz.
L_luz := apoyo_hombro_y - apoyo_cinturon_y
L_luz = 380 mm
Fv := m_total*g*fv
Fv = 735.75 N
Fh := m_total*g*fh
Fh = 245.25 N
N_lado := Fv*frac
N_lado = 515.025 N
Q_lado := Fh*frac
Q_lado = 171.675 N
M0 := N_lado*excentricidad
M0 = 55365.2 N*mm
# La envolvente reune casos alternativos, no un unico diagrama de cargas simultaneas. La
# funcion M_env se declara despues de las cargas porque usa M0, Q_lado y L_luz: en Mathcad una
# funcion se evalua en el momento de declararse y no se resuelve si sus variables todavia no
# existen.
M_env(x) := M0*max(1 - x/L_luz, x/L_luz) + Q_lado*x*(L_luz - x)/L_luz
step := L_luz/800
step = 0.475 mm
x_cont := (L_luz - M0/Q_lado)/2
x_cont = 28.75 mm
i_cont := floor(x_cont/step)
i_cont = 60
x_a := i_cont*step
x_a = 28.5 mm
x_b := (i_cont + 1)*step
x_b = 28.975 mm
Mmax := max(M_env(x_a), M_env(x_b))
Mmax = 55738.6 N*mm
x_max := x_a + (M_env(x_b) > M_env(x_a))*(x_b - x_a)  # SEDAC / P2.04-P2.05 / MC01
x_max = 28.975 mm
# 6. Tensiones, estabilidad y pandeo del refuerzo
GG := E_al/(2*(1 + nu))
GG = 25939.8 MPa
# Caso base: seccion con pared minima de 2,8 mm.
mlat := Q_lado*L_luz/4
# El maximo se evalua sobre la misma malla de 801 puntos que usa el cribado vigente del
# repositorio: se calcula el punto critico continuo y se comparan los dos puntos de malla
# vecinos, de modo que el resultado coincide con el barrido numerico sin depender de vectores.
mlat = 16309.1 N*mm
sig := N_lado/A_min + K_borde*Mmax/Z_min
sig = 95.08 MPa
sig_biax := sig + K_borde*mlat*B/2/Ix_min
sig_biax = 104.955 MPa
T := Q_lado*brazo_torsion
T = 2060.1 N*mm
tau := T*t_min/J_min + Q_lado/A_min
tau = 11.4196 MPa
vm := sqrt(sig_biax^2 + 3*tau^2)
vm = 106.803 MPa
n_combinado := Sy_al/vm
n_combinado = 2.24713
n_euler := π^2*E_al*min(I_min, Ix_min)/(L_luz^2*N_lado)
n_euler = 108.584
sig_placa := 0.43*π^2*E_al/(12*(1 - nu^2))*(t_min/(D - t_min))^2
sig_placa = 477.699 MPa
n_local := min(Sy_al, sig_placa)/vm
n_local = 2.24713
Mcr := π/L_luz*sqrt(E_al*Ix_min*GG*J_min)
Mcr = 1483168 N*mm
n_ltb := Mcr/Mmax
n_ltb = 26.6094
netA := A_min - 2*t_min*d_taladro
netA = 151.2 mm^2
sig_local := N_lado/netA + Mmax*|z_eje - z_min|/I_min + mlat*B/2/Ix_min
sig_local = 28.9866 MPa
n_taladro := Sy_al/(3*sig_local)
n_taladro = 2.7599
# SEDAC / P2.04-P2.05 / MC01
# En el caso base gobierna la fluencia bajo tension combinada; el margen local coincide por el
# limite de fluencia. El pandeo lateral torsional es ideal y no acredita pandeo distorsional
# ni alabeo. Ninguno de estos modos sustituye un analisis de detalle con las geometrias reales
# y las ranuras.
# 7. Uniones: pasador, casquillo, arandelas y perno M5
# Cargas de union deducidas de la envolvente; precarga de estudio hipotetica.
reaction := Mmax/separacion_pernos + Q_lado/2
reaction = 1014.81 N
R := factor_palanca*reaction
R = 1522.22 N
V_union := sqrt((N_lado/2)^2 + reaction^2)
V_union = 1046.98 N
fb := 1.25*precarga + 0.2*R
fb = 2804.44 N
sb := fb/As_M5
sb = 197.496 MPa
tb := V_union/As_M5
tb = 73.7307 MPa
bolt_vm := sqrt(sb^2 + 3*tb^2)
bolt_vm = 235.188 MPa
n_perno := Sy_perno/bolt_vm
n_perno = 2.55115
pin_od_eff := pasador_od - 0.1*mm
pin_od_eff = 9.9 mm
pin_id_eff := 5.6*mm
pin_id_eff = 5.6 mm
n_aplast_ala := Sy_al/(V_union/(t_min*pin_od_eff))
n_aplast_ala = 6.3543
n_aplast_mejilla := Sy_al/(V_union/(t_min*pin_od_eff))
n_aplast_mejilla = 6.3543
n_arranc := 0.577*Sy_al/(V_union/(2*t_min*(dist_borde_perno - d_taladro/2)))
n_arranc = 5.11078
n_casquillo := Sy_al/(1.25*precarga/(π/4*((casquillo_od - 0.1*mm)^2 - (d_taladro + 0.1*mm)^2)))
n_casquillo = 3.59423
pin_area := π/4*(pin_od_eff^2 - pin_id_eff^2)
pin_area = 52.3468 mm^2
pin_Z := π/32*(pin_od_eff^4 - pin_id_eff^4)/pin_od_eff  # SEDAC / P2.04-P2.05 / MC01
pin_Z = 85.5064 mm^3
# 8. Puentes de anclaje y puente inferior de cuna
pin_vm := sqrt((V_union*3.4*mm/pin_Z)^2 + 3*(2*V_union/pin_area)^2)
pin_vm = 80.8302 MPa
# Cargas de correa con el angulo de eslinga hipotetico y reparto de carga no medido.
n_pasador := Sy_al/pin_vm
n_pasador = 2.96919
Tstrap := N_lado/(2*cos(angulo_eslinga))
Tstrap = 314.365 N
washer_sigma := 6*fb/(2*π*4*mm)*max(0, d_taladro/2 - 4*mm)/arandela_esp_min^2
washer_sigma = 87.5699 MPa
Tinterface := max(N_lado/cos(angulo_eslinga), sqrt(N_lado^2 + (Q_lado + M0/L_luz)^2))
Tinterface = 628.729 N
n_arb_flex := Sy_arandela/washer_sigma
n_arb_flex = 2.28389
bridge_M := Tinterface*luz_puente_cinta/4
bridge_M = 8173.48 N*mm
washer_contact := sqrt(3)/2*(8*mm)^2 - π/4*(5.5*mm)^2
washer_contact = 31.6673 mm^2
Z_bridge := esp_anclaje_min*alto_puente_cinta^2/6
Z_bridge = 313.2 mm^3
n_arb_tuerca := Sy_arandela/(fb/washer_contact)
n_arb_tuerca = 2.25837
Z_bridge_out := alto_puente_cinta*esp_anclaje_min^2/6
Z_bridge_out = 100.92 mm^3
sbri := factor_palanca*bridge_M*(cos(angulo_eslinga)/Z_bridge + sin(angulo_eslinga)/Z_bridge_out)
sbri = 101.746 MPa
# El pasador transmite cortante; la precarga la aporta el M5 interior. El casquillo es un tope
# de compresion entre alas: su funcion depende de la longitud ajustada al interior real.
# Ninguna de estas verificaciones cubre roscas, par de apriete, prueba de tuerca autofrenante
# ni desgaste. SUPUESTOS heredados de calcular_p2_05.py:63,71: OD efectivo 9,9 mm e ID 5,6 mm.
# No son medidas ni tolerancias aprobadas. El taladro de 10,2 mm es otra cota.
n_puente_anclaje := Sy_al/sbri
n_puente_anclaje = 2.35881
cuna_Zin := esp_anclaje_min*(15*mm)^2/6
cuna_Zin = 217.5 mm^3
cuna_Zout := 15*mm*esp_anclaje_min^2/6
cuna_Zout = 84.1 mm^3
cuna_sigma := factor_palanca*Tstrap*luz_puente_cinta/4*(cos(angulo_eslinga)/cuna_Zin + sin(angulo_eslinga)/cuna_Zout)
cuna_sigma = 64.8957 MPa
n_puente_cuna := Sy_al/cuna_sigma
n_puente_cuna = 3.69824
# Se toma la carga completa del lado, no la mitad de la cuna. El reparto real entre ramas de
# correa y la rigidez del arnes no estan medidos: son la fuente mas probable de error de este
# bloque.
# SEDAC / P2.04-P2.05 / MC01
# 9. Resumen del cribado
# Quince verificaciones, umbral de margen objetivo y cierre de junta.
n_min := min(n_combinado, n_euler, n_local, n_ltb, n_taladro, n_perno, n_aplast_ala, n_aplast_mejilla, n_arranc, n_casquillo, n_pasador, n_arb_flex, n_arb_tuerca, n_puente_anclaje, n_puente_cuna)
n_min = 2.24713
cumple_cribado := n_min ≥ margen_objetivo and cierre_residual > 0 and flecha ≤ flecha_limite  # error: Esta variable no está definida.
cumple_cribado =  # error: Esta variable no está definida.
flecha := M0*L_luz^2/(9*sqrt(3)*E_al*I_min) + Q_lado*L_luz^3/(48*E_al*I_min)
flecha = 0.866677 mm
giro := T*L_luz/(GG*J_min)*180/π
giro = grados  # error: Esta variable no está definida.
cierre_residual := 0.75*precarga - 0.8*R
cierre_residual = 282.223 N
# El cribado es un filtro de prediseno, no una verificacion de seguridad. No cubre fatiga,
# pandeo distorsional, FEA de detalle, contacto real, abrasion, ergonomia ni liberacion de
# emergencia.
# SEDAC / P2.04-P2.05 / MC01
# 10. Masa del conjunto y presupuesto
# Masa medida en el CAD de P2.04. La bomba y el arnes real siguen sin medir.
masa_presupuesto := masa_CAD + reserva_textil + reserva_adicional
masa_presupuesto = 2.21233 kg
masa_brecha_2kg := masa_presupuesto - 2*kg
masa_brecha_2kg = 0.212328 kg
paquete := B + 2*esp_mejilla
paquete = 38 mm
# La masa de 1,442328 kg es rigida + protectores, medida por MassProperties en Inventor. El
# presupuesto de 2,212328 kg anade la reserva textil de 0,65 kg y 0,12 kg de reserva
# adicional. NO incluye la bomba ni el agua. Los 25 kg del caso de carga son hipotesis de
# carga, no masa de la estructura: no deben agregarse a la masa del CAD.
# SEDAC / P2.04-P2.05 / MC01
# 11. Apilamiento axial de la union y cadena de holguras
# Revision de la longitud nominal del tornillo y de la holgura axial del casquillo.
L_casq := B - 2*t_nom
L_casq = 26 mm
holgura_axial := B - 2*t_nom - L_casq
holgura_axial = 0 mm
bajo_cabeza := paquete + 2*arandela_esp + altura_tuerca
bajo_cabeza = 49 mm
saliente := longitud_tornillo - bajo_cabeza
saliente = 6 mm
# La longitud nominal de un tornillo de cabeza cilindrica se mide desde debajo de la cabeza
# hasta la punta: la altura de la cabeza no se descuenta del largo disponible. El apilamiento
# bajo cabeza hasta la cara exterior de la tuerca es paquete + 2 arandelas + tuerca; la
# diferencia con la longitud nominal es la saliente geometrica. La holgura axial del casquillo
# sale de la definicion vigente L_casq = B - 2t, es decir, ocupa exactamente el ancho
# interior: con t > 3 mm aparece holgura negativa. La funcion documentada del casquillo es
# actuar como tope de compresion y evitar aplastar las alas durante el apriete; acortarlo
# cambia esa funcion y no se justifica sin cerrar la cadena de tolerancias con medidas reales
# de B y t.
# SEDAC / P2.04-P2.05 / MC01
# 12. Sensibilidad de la profundidad del canal (caso D24)
# D-14 pide sensibilidad a los parametros inciertos antes de FEA, fatiga y pandeo.
# Profundidad evaluada: D. Se mantienen el resto de entradas del caso base.
A_D24 := A_sec(B, D, t_min)
A_D24 = 208.32 mm^2
z_D24 := z_sec(B, D, t_min)
z_D24 = 8.23871 mm
I_D24 := I_sec(B, D, t_min)
I_D24 = 11858 mm^4
Ix_D24 := Ix_sec(B, D, t_min)
Ix_D24 = 33029.8 mm^4
Z_D24 := Z_sec(B, D, t_min)
Z_D24 = 752.348 mm^3
J_D24 := J_sec(B, D, t_min)
J_D24 = 544.41 mm^4
sig_D24 := N_lado/A_D24 + K_borde*Mmax/Z_D24
sig_D24 = 95.08 MPa
sig_biax_D24 := sig_D24 + K_borde*mlat*B/2/Ix_D24
sig_biax_D24 = 104.955 MPa
tau_D24 := T*t_min/J_D24 + Q_lado/A_D24
tau_D24 = 11.4196 MPa
vm_D24 := sqrt(sig_biax_D24^2 + 3*tau_D24^2)
vm_D24 = 106.803 MPa
sig_placa_D24 := 0.43*π^2*E_al/(12*(1 - nu^2))*(t_min/(D - t_min))^2
sig_placa_D24 = 477.699 MPa
n_comb_D24 := Sy_al/vm_D24
n_comb_D24 = 2.24713
n_local_D24 := min(Sy_al, sig_placa_D24)/vm_D24
n_local_D24 = 2.24713
n_caso_D24 := min(n_comb_D24, n_local_D24)
n_caso_D24 = 2.24713
# SEDAC / P2.04-P2.05 / MC01
# 12. Sensibilidad de la profundidad del canal (caso D26)
# D-14 pide sensibilidad a los parametros inciertos antes de FEA, fatiga y pandeo.
# Profundidad evaluada: 26*mm. Se mantienen el resto de entradas del caso base.
A_D26 := A_sec(B, 26*mm, t_min)
A_D26 = 219.52 mm^2
z_D26 := z_sec(B, 26*mm, t_min)
z_D26 = 9.09388 mm
I_D26 := I_sec(B, 26*mm, t_min)
I_D26 = 14847.7 mm^4
Ix_D26 := Ix_sec(B, 26*mm, t_min)
Ix_D26 = 35424.5 mm^4
Z_D26 := Z_sec(B, 26*mm, t_min)
Z_D26 = 878.245 mm^3
J_D26 := J_sec(B, 26*mm, t_min)
J_D26 = 573.679 mm^4
sig_D26 := N_lado/A_D26 + K_borde*Mmax/Z_D26
sig_D26 = 81.6785 MPa
sig_biax_D26 := sig_D26 + K_borde*mlat*B/2/Ix_D26
sig_biax_D26 = 90.8863 MPa
tau_D26 := T*t_min/J_D26 + Q_lado/A_D26
tau_D26 = 10.8369 MPa
vm_D26 := sqrt(sig_biax_D26^2 + 3*tau_D26^2)
vm_D26 = 92.8043 MPa
sig_placa_D26 := 0.43*π^2*E_al/(12*(1 - nu^2))*(t_min/(26*mm - t_min))^2
sig_placa_D26 = 398.887 MPa
n_comb_D26 := Sy_al/vm_D26
n_comb_D26 = 2.58609
n_local_D26 := min(Sy_al, sig_placa_D26)/vm_D26
n_local_D26 = 2.58609
n_caso_D26 := min(n_comb_D26, n_local_D26)
n_caso_D26 = 2.58609
# SEDAC / P2.04-P2.05 / MC01
# 12. Sensibilidad de la profundidad del canal (caso D28)
# D-14 pide sensibilidad a los parametros inciertos antes de FEA, fatiga y pandeo.
# Profundidad evaluada: 28*mm. Se mantienen el resto de entradas del caso base.
A_D28 := A_sec(B, 28*mm, t_min)
A_D28 = 230.72 mm^2
z_D28 := z_sec(B, 28*mm, t_min)
z_D28 = 9.96311 mm
I_D28 := I_sec(B, 28*mm, t_min)
I_D28 = 18268.2 mm^4
Ix_D28 := Ix_sec(B, 28*mm, t_min)
Ix_D28 = 37819.2 mm^4
Z_D28 := Z_sec(B, 28*mm, t_min)
Z_D28 = 1012.82 mm^3
J_D28 := J_sec(B, 28*mm, t_min)
J_D28 = 602.948 mm^4
sig_D28 := N_lado/A_D28 + K_borde*Mmax/Z_D28
sig_D28 = 71.0234 MPa
sig_biax_D28 := sig_D28 + K_borde*mlat*B/2/Ix_D28
sig_biax_D28 = 79.6482 MPa
tau_D28 := T*t_min/J_D28 + Q_lado/A_D28
tau_D28 = 10.3109 MPa
vm_D28 := sqrt(sig_biax_D28^2 + 3*tau_D28^2)
vm_D28 = 81.6258 MPa
sig_placa_D28 := 0.43*π^2*E_al/(12*(1 - nu^2))*(t_min/(28*mm - t_min))^2
sig_placa_D28 = 338.084 MPa
n_comb_D28 := Sy_al/vm_D28
n_comb_D28 = 2.94025
n_local_D28 := min(Sy_al, sig_placa_D28)/vm_D28
n_local_D28 = 2.94025
n_caso_D28 := min(n_comb_D28, n_local_D28)
n_caso_D28 = 2.94025
# SEDAC / P2.04-P2.05 / MC01
# Lectura: aumentar D reduce la tension combinada y tambien la tension critica elastica local
# del ala. Un margen local mayor no demuestra mayor resistencia elastica al pandeo. El cambio
# exige reevaluar la altura de mejilla y desplaza el reparto de cargas entre las uniones. El
# caso base ya cumple el umbral con margen estrecho; cualquier reduccion de pared o de seccion
# puede llevarla por debajo. La sensibilidad completa, incluyendo factores de carga, reparto y
# excentricidad, se hace sobre las cifras medidas, no sobre hipotesis: por eso las entradas de
# carga siguen marcadas como hipotesis.
# 13. Datos de laboratorio pendientes (simbolos NO definidos)
# Definir estos simbolos activa los bloques de verificacion posterior.
# Simbolos que deben definirse cuando existan mediciones, con su unidad:
# m_bomba_vacia, m_bomba_llena  (kg)  masa de la bomba de espalda con y sin agua, con
# manguera
# z_cg_bomba, x_cg_bomba, y_cg_bomba (mm) centro de masa de la bomba llena, medido
# m_arnes, z_cg_arnes (kg, mm)  masa y centro de masa del arnes con acolchado
# B_med, t_med (mm)  ancho exterior y espesor real de pared de los canales
# L_casq_med (mm)  longitud real de los casquillos ya ajustados
# ancho_cinta, esp_cinta (mm)  ancho y espesor real de las correas
# rigidez_correa (N/mm)  rigidez axial medida de la correa
# ancho_apoyo_hombro, ancho_apoyo_cinturon (mm)  zonas de apoyo efectiva
# recorrido_cinta (mm)  recorrido real de las cintas
# IMU_1, IMU_2, ... (datos de sensor) series de IMU crudas con su calibracion
# Ninguno de estos valores se inventa ni se aproxima con ceros. Si un simbolo permanece
# indefinido, cualquier expresion que lo use quedara marcada como error por Mathcad: esa es la
# deteccion de entradas incompletas en el motor de calculo.
# Orden recomendado de incorporacion (D-14 y D-15): 1) masa y centro de masa reales de bomba y
# arnes; 2) apoyos y zonas de contacto; 3) rigidez y recorrido de correas; 4) B, t y
# longitudes reales de las piezas; 5) incorporar los datos de IMU para comparar la respuesta
# medida contra la respuesta predicha.
# SEDAC / P2.04-P2.05 / MC01
# 14. Comparacion entre prediccion y ensayo
# Plantilla de cotejo. Los campos de izquierda se llenan con la memoria; los de derecha, con
# el ensayo.
# Magnitudes a cotejar tras un ensayo instrumentado:
# desplazamiento o flecha en el punto de apoyo  predicho por esta hoja  medido en
# ensayo  diferencia
# inclinacion o giro del conjunto  predicho  medido
# diferencia
# desplazamiento relativo bomba-arnes  predicho  medido
# diferencia
# frecuencia propia del conjunto (ensayo de impacto)  no calculada  medido
# -
# carga en correa en el punto de anclaje  predicho por Tinterface  medido
# con celda  diferencia
# La prediccion exige un modelo dinamico valido: una IMU con acelerometro y giroscopio entrega
# fuerza especifica y velocidad angular; no mide directamente fuerzas. Convertir aceleracion
# en fuerza exige un modelo dinamico (masa, rigidez, amortiguamiento) y sus condiciones de
# validez. La instrumentacion adicional de fuerza o tension es la que permite cerrar esa
# cadena; sin ella, la IMU no valida la resistencia del prototipo.
# Criterio de aceptacion de la comparacion: PENDIENTE de acordar con el profesor de
# biomecanica. Debe fijarse antes del ensayo piloto: tolerancia admisible, numero de
# repeticiones y tratamiento de la dispersion.
# SEDAC / P2.04-P2.05 / MC01
# 15. Limites de uso de esta memoria
# Lo que la hoja permite y lo que no.
# PERMITE: recalcular el cribado al cambiar geometria, material, uniones o cargas; obtener el
# factor de seguridad de cada modo con la misma hipotesis; ver la sensibilidad a la
# profundidad; y dejar registro de que valores se usaron.
# NO PERMITE: declarar seguridad, resistencia, comodidad o cumplimiento normativo; extrapolar
# a personas sin ensayo autorizado; sustituir una FEA de detalle; sustituir la medicion de la
# bomba, el arnes, las correas o el contacto.
# Advertencia sobre la version: esta hoja reproduce el modelo del cribado vigente del
# repositorio SEDAC_CAD con la geometria P2.04. Si el generador del CAD cambia, hay que
# regenerar, volver a medir la masa en Inventor y recalcular esta hoja; la coherencia entre
# CAD, memoria y documentos no es automatica.
